SXmax := READPRN("C:\stress\stress_tmr\normal_max_x.txt")
SYmax := READPRN("C:\stress\stress_tmr\normal_max_y.txt")
SZmax := READPRN("C:\stress\stress_tmr\normal_max_z.txt")
TXYmax := READPRN("C:\stress\stress_tmr\shear_max_xy.txt")
TXZmax := READPRN("C:\stress\stress_tmr\shear_max_xz.txt")
TYZmax := READPRN("C:\stress\stress_tmr\shear_max_yz.txt")
SXmin := READPRN("C:\stress\stress_tmr\normal_min_x.txt")
SYmin := READPRN("C:\stress\stress_tmr\normal_min_y.txt")
SZmin := READPRN("C:\stress\stress_tmr\normal_min_z.txt")
TXYmin := READPRN("C:\stress\stress_tmr\shear_min_xy.txt")
TXZmin := READPRN("C:\stress\stress_tmr\shear_min_xz.txt")
TYZmin := READPRN("C:\stress\stress_tmr\shear_min_yz.txt")
N_nodes := length(TYZmin[:, 1])
N_nodes = 35853
i := 0 .. N_nodes
Nmin_x := SXmin[:, 3]
SXamp := (SXmax[:, 3] - SXmin[:, 3])/2
TXYamp := (TXYmax[:, 3] - TXYmin[:, 3])/2
Nmax_x := SXmax[:, 3]
Nmax_y := SYmax[:, 3]
Nmin_y := SYmin[:, 3]
SYamp := (SYmax[:, 3] - SYmin[:, 3])/2
TXZamp := (TXZmax[:, 3] - TXZmin[:, 3])/2
Nmax_z := SZmax[:, 3]
Nmin_z := SZmin[:, 3]
Smax_xy := TXYmax[:, 3]
Smin_xy := TXYmin[:, 3]
SZamp := (SZmax[:, 3] - SZmin[:, 3])/2
TYZamp := (TYZmax[:, 3] - TYZmin[:, 3])/2
Smax_yz := TYZmax[:, 3]
Smin_yz := TYZmin[:, 3]
Smax_xz := TXZmax[:, 3]
Smin_xz := TXZmin[:, 3]
SXm := (SXmax[:, 3] + SXmin[:, 3])/2
TXYm := (TXYmax[:, 3] + TXYmin[:, 3])/2
SYm := (SYmax[:, 3] + SYmin[:, 3])/2
TXZm := (TXZmax[:, 3] + TXZmin[:, 3])/2
SZm := (SZmax[:, 3] + SZmin[:, 3])/2
TYZm := (TYZmax[:, 3] + TYZmin[:, 3])/2
# Предел прочности материала:
σ_в := 1080
# Предел выносливости материала:
σ_1 := 430
σ_в := 35000
τ_1 := 290
ν_σ := 0.02 + 2*10^-4*σ_в = 7.02
ν_τ := 1.5*ν_σ = 10.53
F := 1476
d_0 := 7.5
d_экв := sqrt(4*F/π)
ε_σ := 0.5*(1 + (d_экв/d_0)^(-2*ν_σ)) = 0.5
ε_τ := 0.5*(1 + (d_экв/d_0)^(-2*ν_τ)) = 0.5
β_упр := 1
ε_β := 1 - 0.22*log(3.2)*(log(σ_в/20) - 1) = 0.750724
ε_βτ := 0.575*ε_β + 0.425
K_σ := 1/(ε_σ*β_упр*ε_β)
K_τ := 1/(ε_τ*β_упр*ε_βτ)
ψ_σ := 0.02 + 2*10^-4*σ_в = 7.02
ψ_τ := 0.01 + 10^-4*σ_в = 3.51
σ_x := K_σ*SXamp + ψ_σ*SXm
σ_y := K_σ*SYamp + ψ_σ*SYm
σ_z := K_σ*SZamp + ψ_σ*SZm
τ_xy := K_τ*TXYamp + ψ_τ*TXYm
τ_xz := K_τ*TXZamp + ψ_τ*TXZm
τ_zy := K_τ*TYZamp + ψ_τ*TYZm
σ_e := 1*((σ_x - σ_y)^2 + (σ_y - σ_z)^2 + (σ_z - σ_x)^2 + 6*(τ_xy^2 + τ_xz^2 + τ_zy^2))^0.5/sqrt(2)
G := 1311
n := σ_1/σ_e
INDEX := match(min(n), n) = [327]
min(n) = 1.64575
max(n) = 14802.8
n_1 :=
    for i ∈ 0 .. N_nodes - 1
        n_1[i] ← 10 if n[i] ≥ 10
        n_1[i] ← n[i] otherwise
        n_1
n =  # no stored result
n_1 =  # no stored result
Nmax_x[G] := 322
Nmax_y[G] := 322
Nmax_z[G] := 322
T_σmax := [
    Nmax_x[G], Smax_xy[G], Smax_xz[G];
    Smax_xy[G], Nmax_y[G], Smax_yz[G];
    Smax_xz[G], Smax_yz[G], Nmax_z[G]
] = [322, 0.4009, -0.10075; 0.4009, 322, -0.16697; -0.10075, -0.16697, 322]
T_Kmin := [
    Nmin_x[G], Smin_xy[G], Smin_xz[G];
    Smin_xy[G], Nmin_y[G], Smin_yz[G];
    Smin_xz[G], Smin_yz[G], Nmin_z[G]
] = [0.12142, 0.35701, -0.1734; 0.35701, 0.58568, -0.087981; -0.1734, -0.087981, 0.04487]
